// COMSOL Multiphysics 6.0.0.405 model "Dam breaking on a column - without Run.mph"
// Outline of the model tree

Probes
  bnd1: Boundary "Boundary Probe 1" on boundaries 7, 8
    type = integral
    probename = Fp
    expr = swe.Fpy
    unit = N
    descr = Pressure force on the column
    frame = spatial
    table = tbl1

Geometry
  geom1 "Geometry 1" (2D, length unit m)
    r1: Rectangle | layername = Layer 1; layer = 0.4; size = {0.61, 1.6}
    sq1: Square | pos = {0.24, 0.9}; size = 0.12
    dif1: Difference | input = r1; input2 = sq1
    fin: Finalize "Form Union"

Physics
  swe: ShallowWaterEquationsTimeExplicit on all domains
    dependent variable h
    dp1: DomainProperties (default)
    init1: init "Initial Values 1" (default) | h_init = 0.01
    wallbc1: WallBC "Wall 1" (default)
    init2: init "Initial Values 2" on domains 1 | h_init = 0.3

Mesh
  mesh1 "Mesh 1" (physics-controlled)
    size: MeshSizeDefault | table = cfd; hauto = 3

Studies
  std1 "Study 1"
    stat: Stationary
    time: Transient "Time Dependent" | tlist = range(0,0.01,3); initialtime = 0; useinitsol = on; initstudy = std1

Solver configurations
  sol1 "Solution 1" (study std1)
    v1: Variables "Dependent Variables 1"
    s1: Stationary "Stationary Solver 1"
      dDef: Direct
      fc1: FullyCoupled | linsolver = dDef
    su1: StoreSolution "Solution Store 1"
    v2: Variables "Dependent Variables 2" | notsolmethod = sol
    tx1: TimeExplicit "Time-Explicit Solver 1"
      tlist = range(0,0.01,3)
      erkorder = 3
      tstepping = elemexprs
      rktimestep = comp1.swe.dt_CFL
      exprs = root.comp1.swe.wtc
      updtstep = manual
      ntimestepsupdate = 1
      dDef: Direct
      fc1: FullyCoupled | linsolver = dDef
  sol2 "Solution Store 1" (study std1)

Datasets
  dset1: Solution | solution = sol1
  dset2: Solution | solution = sol2
  dset3: Solution "Probe Solution 3" | solution = sol1
  int1: Integral "Boundary Probe 1" on boundaries 7, 8 | data = dset3

Derived values
  pev1: EvalPoint "Boundary Probe 1" | data = int1; table = tbl1; expr = swe.Fpy

Tables
  tbl1: Table "Probe Table 1"
    Time (s) | Pressure force on the column (N), Boundary Probe 1
    0 | -2.1684e-18
    0.00238931 | -8.67362e-19
    0.00477862 | -8.67362e-19
    0.00716793 | -8.67362e-19
    0.00955724 | -8.67362e-19
    0.0118246 | -8.67362e-19
    0.0140764 | -8.67362e-19
    0.0162529 | -8.67362e-19
    0.0184181 | -8.67362e-19
    0.0205716 | -8.67362e-19
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
Plots
  pg1: PlotGroup2D "Total Height (swe)" | data = dset1
    surf1: Surface "Total Height" | expr = swe.H
      hght1: Height "Height Expression 1" | expr = h
      mtrl1: MaterialAppearance | appearance = custom; family = water
    surf2: Surface "Bottom Height" | expr = swe.hb
      hght1: Height "Height Expression 1" | expr = h
      mtrl1: MaterialAppearance | appearance = custom; family = rock
  pg2: PlotGroup2D "Velocity Magnitude (swe)" | data = dset1
    surf1: Surface "Velocity Magnitude" | expr = swe.U
    str1: Streamline (disabled) | expr = {swe.ux, swe.uy}; udist = 0.01
  pg3: PlotGroup1D "Probe Plot Group 3"
    tblp1: Table "Probe Table Graph 1" | table = tbl1

Exports
  anim1: Animation | target = player; frametime = 0.4
  anim2: Animation | target = player; frametime = 0.4
  anim3: Animation | target = player